# Hexapod 2G
# Обратная задача кинематики
# Константы (длины звеньев)
# Точка назначения
# (координаты конца лапы)
OA := 37
AB := 44
BC := 83
Destination := [50; 0; -50]
x := Destination[0] = 50
y := Destination[1] = 0
z := Destination[2] = -50  # Решение для передней правой лапы
p := sqrt(x^2 + y^2) = 50
OC := sqrt(p^2 + z^2) = 70.7107
AC := sqrt((p - OA)^2 + z^2) = 51.6624
Qrad := atan(z/(p - OA)) = -1.31643
Q0rad := acos((AB^2 + AC^2 - BC^2)/(2*AB*AC)) = 2.09715
q0rad := atan(y/x) = 0
q1rad := Qrad + Q0rad = 0.780726
q2rad := acos((AB^2 + BC^2 - AC^2)/(2*AB*BC)) = 0.568284
q0real := q0rad*180/π = 0
q1real := q1rad*180/π = 44.7323
q2real := q2rad*180/π = 32.5603
q0 := q0real + 45 = 45
q1 := q1real + 90 = 134.732
q2 := q2real = 32.5603
Ap := OA
Bp := OA + AB*cos(q1rad) = 68.2577
Cp := p = 50
Ax := OA*cos(q0rad) = 37
Bx := Bp*cos(q0rad) = 68.2577
Cx := x = 50
Ay := OA*sin(q0rad) = 0
By := Bp*sin(q0rad) = 0
Cy := y = 0
Az := 0
Bz := AB*sin(q1rad) = 30.967
Cz := z = -50
CoordY := [0; Ay; By; Cy]
CoordX := [0; Ax; Bx; Cx]
CoordZ := [0; Az; Bz; Cz] = [0; 0; 30.967; -50]
CoordP := [0; Ap; Bp; Cp] = [0; 37; 68.2577; 50]
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# Решение прямой задачи кинематики
q0real := q0 - 45 = 0
q1real := q1 - 90 = 44.7323
q2real := q2 = 32.5603
q0rad := q0real*π/180 = 0
q0 := 90
q0 := 90
q1rad := q1real*π/180 = 0.780726
q1 := 153.605
q2 := 45.519
q1 := 90
q2rad := q2real*π/180 = 0.568284
q2 := 90
Bp := OA + AB*cos(q1rad) = 68.2577
Cp := Bp + BC*cos(π - q1rad - q2rad) = 50
Ap := OA = 37
Ax := Ap*cos(q0rad) = 37
Bx := Bp*cos(q0rad) = 68.2577
Cx := Cp*cos(q0rad) = 50
Ay := Ap*sin(q0rad) = 0
By := Bp*sin(q0rad) = 0
Cy := Cp*sin(q0rad) = 0
Az := 0
Bz := AB*sin(q1rad) = 30.967
Cz := Bz - BC*sin(π - q1rad - q2rad) = -50
Cx = 50
Cy = 0
CoordY := [0; Ay; By; Cy]
CoordX := [0; Ax; Bx; Cx]
CoordZ := [0; Az; Bz; Cz] = [0; 0; 30.967; -50]
CoordP := [0; Ap; Bp; Cp] = [0; 37; 68.2577; 50]
Cz = -50
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